/CLEAR
/PREP7
! node
N,1,0,0
N,2,100,0
N,3,200,0
! spring element
ET,1,COMBIN14
KEYOPT,1,1,0
KEYOPT,1,2,0
KEYOPT,1,3,0
! spring prop
R,1,10
R,2,20
! mesh
REAL,1
E,1,2
REAL,2
E,2,3
! load
F,3, FX, 30
! bc
D,1, UX, 0

/SOLU
SOLVE

FINISH
/POST1
/EFACET,1
PLNSOL, U,X, 0,1.0
/VSCALE,1,1,0
PLVECT,U, , , ,VECT,ELEM,ON,0
PRNSOL,U,X
